// COMSOL Multiphysics 6.2.0.415 model "biochemical_simulation.mph"
// Outline of the model tree

Parameters
  xGEOMETRY = 0  // === Geometry Parameters ===
  R = 100 [um]
  xNATIVExECT2 = 0  // === Native Ect2 Parameters ===
  D_C = 10 [um^2/s]  // Cytosolic Ect2 Diffusion
  D_m = 0.5 [um^2/s]  // Membrane Ect2 Diffusion
  k_on = 0.5 [um/s]  // Ect2 Membrane Attachment
  k_off = 5 [1/s]  // Ect2 Membrane Detachment
  k_dp = 2.5 [1/s]  // Dephosphorylation Rate
  k_fb = 0.5 [um^2/s]  // Autocatalytic Dephosphorylation Rate
  K_p = 0.1 [1/um^2]  // Phosphorylation Saturation Constant
  n_Ect2 = 14.67 [1/um^2]  // Total Ect2 concentration
  u0 = 0.3 [1/um]  // Background GEF concentration
  xPHOTOSENSITIVE_GEF = 0  // === Photoactivation Parameters ===
  D_A = 1 [um^2/s]  // Cytosolic photoactive GEF
  D_D = 1 [um^2/s]  // Cytosolic photoinactive GEF
  D_a = 0.01 [um^2/s]  // Membrane photoactive GEF
  D_d = 0.01 [um^2/s]  // Membrane photoinactive GEF
  D_b = 0.01 [um^2/s]  // Membrane anchors
  kP_on = 7.5E-2 [1/s]  // Photoactivation rate
  kP_off = 6.7E-4[1/s]  // Photodeactivation rate
  kA_on = 1.8E-5 [um/s] * 50  // Active attachment rate
  kA_off = 9.2E-4 [1/s]  // Active detachment rate
  kD_on = 0.001 * kA_on  // Inactive attachment rate
  kD_off = kA_off  // Inactive detachment rate
  n_GEF = 15 [1/um^2]  // Total GEF concentration
  xRHO = 0  // === Rho Parameters ===
  D_R = 10 [um^2/s]  // Cytosolic Rho Diffusion
  D_rd = 0.1 [um^2/s]  // Rho-GDP Diffusion
  D_rt = 0.1 [um^2/s]  // Rho-GTP Diffusion
  kR_on = 1.5E-4 [um/s]  // Rho-GDP attachment
  kR_off = 1.5E-5 [1/s]  // Rho-GDP detachment
  kR_r = 6E-4 [um/s]  // Nucleotide exchange
  kR_rg = 6E-4 [um/s]  // Nucleotide Exchange due to optogenetic GEF
  kR_dt = 3.6E-2 [um^3/s]  // Autocatalytic activation rate
  mesh_scale = 0.5
  RCF = 50  // Required since the model formulation assumes a 1D bulk on a 1D membrane, so parameters need to be rescaled according to bulk/boundary ratio
  urtSatCoeff = 15 [1/um]
  advLambda = 15 [um]
  advZeta = 1 [um^2/s]
  kR_gap = 1.5E-2 [1/s]  // Rho-GTP detachment
  n_R = 0.28 [1/um^2]  // Total Rho Concentration

Functions
  step1: Step "Misc: Step" | funcname = stp
  an4: Analytic "Batch 1" | funcname = bat1; expr = stp((x-x0)/R+bs/2/R) * stp(-(x-x0)/R+bs/2/R) * stp((y-y0)/R+bs/2/R) * stp(-(y-y0)/R+bs/2/R); args = {x, y, x0, y0, bs}; argunit = {m, m, m, m, m}
  sw1: FunctionSwitch "Cdk1-mediated phosphorylation rate" | funcname = kcdk1; definecases = on
    an1: Analytic "Photosensitive" | expr = 80; args = {x, y, t}; fununit = 1/(s * um^2); argunit = {m, m, s}
    an2: Analytic "Wild-Type" | expr = (100 - 3.6 * (x-R)*1E6) * (1-t/(100+t)); args = {x, y, t}; fununit = 1/(s * um^2); argunit = {m, m, s}
  sw2: FunctionSwitch "Spatial Light Pattern" | funcname = I_space; definecases = on
    an1: Analytic "Global" | expr = 1; args = {x, y}; argunit = {m, m}
    an2: Analytic "Local Single" | expr = bat1(x,y,R,0,0.2*R); args = {x, y}; argunit = {m, m}
    an3: Analytic "Local Opposed" | expr = bat1(x,y,0,-R,0.2*R) + bat1(x,y,0,R,0.2*R); args = {x, y}; argunit = {m, m}
    an4: Analytic "Local Angled Pi/6" | expr = bat1(x,y,R*cos(pi/6),R*sin(pi/6),0.2*R) + bat1(x,y,R*cos(pi/6),-R*sin(pi/6),0.2*R); args = {x, y}; argunit = {m, m}
    an5: Analytic "Local Square" | expr = bat1(x,y,0,-R,0.2*R) + bat1(x,y,0,R,0.2*R) + bat1(x,y,-R,0,0.2*R) + bat1(x,y,R,0,0.2*R); args = {x, y}; argunit = {m, m}
  sw3: FunctionSwitch "Temporal Light Pattern" | funcname = I_temp; definecases = on
    an1: Analytic "Pulse 10s" | expr = stp(10-t); args = t
    an4: Analytic "Pulse 3600s Strong" | expr = stp(3600-t); args = t
    an2: Analytic "Continuous" | expr = 1; args = t
    an3: Analytic "Off" | expr = 0; args = t
    an5: Analytic "Pulse 3600s Weak" | expr = stp(3600-t) * 0.02; args = t
  sw4: FunctionSwitch "Relative Anchor concentration" | funcname = anc; definecases = on
    an1: Analytic "Homogeneous" | expr = 1; args = {x, y}; argunit = {m, m}
    an2: Analytic "Gradient" | expr = (1 + 0.5*x/R); args = {x, y}; argunit = {m, m}
  an3: Analytic "Light Intensity" | funcname = I; expr = I_space(x,y) * I_temp(t); args = {x, y, t}; argunit = {m, m, s}
  sw5: FunctionSwitch "GEF Modifier" | funcname = GEF_modifier; definecases = on
    an1: Analytic "Opto-GEF" | expr = 1
    an2: Analytic "Opto-GEF*" | expr = 4/3.6
    an3: Analytic "Weak Opto-GEF*" | expr = 3.83/3.6

Variables
  var1 "Variables 1"
    uGEF = u0+ue
    C = tanh(urt/(urtSatCoeff))

Selections
  sel1: Explicit "Membrane" on boundaries 1-4 | groupcontang = on

Couplings
  intop1: Integration on domains 1
  intop2: Integration on all boundaries

Geometry
  geom1 "Geometry 1" (2D, length unit µm)
    c1: Circle | r = R
    fin: Finalize "Form Union"

Physics
  gEC: GeneralFormPDE "Native Ect2 [C]" on all domains
    dependent variable uE = {uE, uEp}
    Units.DependentVariableQuantity = none
    Units.CustomDependentVariableUnit = m^-2
    Units.CustomSourceTermUnit = m^-2 * s^-1
    gfeq1: GeneralFormPDE (default)
      f = {- kcdk1(x,y,t) * uE / (K_p + uE) + (k_dp + k_fb * uE) * uEp, + kcdk1(x,y,t) * uE / (K_p + uE) - (k_dp + k_fb * uE) * uEp}
      Ga = {{-uEx * D_C, -uEy * D_C}, {-uEpx * D_C, -uEpy * D_C}}
      da = {1, 0, 0, 1}
    zflx1: ZeroFluxBoundary "Zero Flux 1" (default)
    init1: init "Initial Values 1" (default) | uEp = n_Ect2
    flux1: FluxBoundary "Flux/Source 1" on selection sel1 | g = {-k_on * uE + k_off * ue, 0}
  gEM: GeneralFormBoundaryPDE "Native Ect2 [M]" on all boundaries
    dependent variable ue
    Units.DependentVariableQuantity = none
    Units.CustomDependentVariableUnit = 1/m
    Units.CustomSourceTermUnit = 1/(m*s)
    gfeq1: GeneralFormPDE (default) | f = k_on * uE - k_off * ue; Ga = {-ueTx * D_m + vx*ue, -ueTy * D_m + vy*ue}; da = 1
    init1: init "Initial Values 1" (default) | ue = 0.01 [1/um]
  gGC: GeneralFormPDE "Photosensitive GEF [C]" on all domains
    dependent variable cA = {cA, cD}
    Units.DependentVariableQuantity = none
    Units.CustomDependentVariableUnit = m^-2
    Units.CustomSourceTermUnit = m^-2 * s^-1
    gfeq1: GeneralFormPDE (default)
      f = {I(x,y,t) * kP_on * cD - kP_off * cA, - I(x,y,t) * kP_on * cD + kP_off * cA}
      Ga = {{-cAx * D_A, -cAy * D_A}, {-cDx * D_D, -cDy * D_D}}
      da = {1, 0, 0, 1}
    zflx1: ZeroFluxBoundary "Zero Flux 1" (default)
    init1: init "Initial Values 1" (default) | cD = n_GEF
    flux1: FluxBoundary "Flux/Source 1" on selection sel1 | g = {- kA_on * cA * anc(x,y) + kA_off * ca, 0}
  gGM: GeneralFormBoundaryPDE "Photosensitvie GEF [M]" on all boundaries
    dependent variable ca
    Units.DependentVariableQuantity = none
    Units.CustomDependentVariableUnit = 1/m
    Units.CustomSourceTermUnit = m^-1 * s^-1
    gfeq1: GeneralFormPDE (default)
      f = kA_on * cA * anc(x,y) - kA_off * ca
      Ga = {-caTx * D_a + vx*ca, -caTy * D_a + vy*ca}
      da = 1
    init1: init "Initial Values 1" (default)
  gRC: GeneralFormPDE "Rho [C]" on all domains
    dependent variable uR
    Units.DependentVariableQuantity = none
    Units.CustomDependentVariableUnit = m^-2
    Units.CustomSourceTermUnit = m^-2 * s^-1
    gfeq1: GeneralFormPDE (default) | f = 0; Ga = {-uRx * D_R, -uRy * D_R}; da = 1
    zflx1: ZeroFluxBoundary "Zero Flux 1" (default)
    init1: init "Initial Values 1" (default) | uR = 9.1955 / 50 * 1E12 * 0 + 0.656821* n_R
    flux1: FluxBoundary "Flux/Source 1" on selection sel1 | g = kR_off * urd - kR_on * uR * RCF + kR_gap * urt
  gRM: GeneralFormBoundaryPDE "Rho [M]" on all boundaries
    dependent variable ur = {urt, urd}
    Units.DependentVariableQuantity = none
    Units.CustomDependentVariableUnit = m^-1
    Units.CustomSourceTermUnit = m^-1 * s^-1
    gfeq1: GeneralFormPDE (default)
      f = {uGEF * (kR_r + kR_dt * urt^2 * GEF_modifier(0)) * urd - kR_gap * urt + ca * kR_rg * urd, - uGEF * (kR_r + kR_dt * urt^2 * GEF_modifier(0)) * urd - kR_off * urd + kR_on * uR * RCF - ca * kR_rg * urd}
      Ga = 
        {-urtTx * D_rt + vx*urt, -urtTy * D_rt + vy*urt}
        {-urdTx * D_rd + vx * urd, -urdTy * D_rd + vy * urd}
      da = {1, 0, 0, 1}
    init1: init "Initial Values 1" (default)
      urt = 0.087238 *1E6 * 0 + 0.006231*n_R * R/2
      urd = 4.7173*1E6* 0 + 0.33695*n_R * R/2
  gV: GeneralFormBoundaryPDE "Advection Field" on all boundaries
    dependent variable v = {vx, vy}
    Units.DependentVariableQuantity = none
    Units.CustomDependentVariableUnit = m/s
    Units.CustomSourceTermUnit = 1/s
    gfeq1: GeneralFormPDE (default)
      f = {1/advLambda*vx, 1/advLambda*vy}
      Ga = 
        {advLambda*vxTx+advZeta/advLambda*C, advLambda*vyTx}
        {advLambda*vxTy, advLambda*vyTy+advZeta/advLambda*C}
      da = {0, 0, 0, 0}
    init1: init "Initial Values 1" (default)

Mesh
  mesh1 "Mesh 1"
    size: MeshSizeDefault | hmax = 13.4; hmin = 0.06; hcurve = 0.3; hgrad = 1.3
    edg1: Edge on selection sel1
      size1: Size on selection sel1 | hmax = 1*mesh_scale; custom = on
    ftri1: FreeTri "Free Triangular 1" on entire geometry | method = del
      size1: Size on entire geometry | hmax = 7*mesh_scale; hgrad = 1.5; custom = on

Studies
  std1 "Study 1"
    funsw: FunctionSweep
      sweeptype = sparse
      pname = {funsw.comp1.kcdk1, funsw.comp1.I_space, funsw.comp1.I_temp, funsw.comp1.anc, funsw.comp1.GEF_modifier}
      plistarr = {"1,2,1,1,1,1,1", "1,2,2,2,2,3,5", "1,4,1,1,1,1,1", "2,1,1,1,1,1,1", "1,1,3,2,1,1,1"}
      pcase = {user, user, user, user, user}
    param: Parametric "Parametric Sweep" (disabled)
      pname = kR_dt
      plistarr = range(3.5, 0.02, 4.5)*1E-2 [um^3/s]
      punit = m^3/s
    time: Transient "Time Dependent" | tlist = range(0,5,6000); usertol = on; rtol = 1e-7

Solver configurations
  sol1 "Solution 1" (study std1)
    v1: Variables "Dependent Variables 1"
    t1: Time "Time-Dependent Solver 1" | tlist = range(0,5,6000); rtol = 1e-7
      dDef: Direct | linsolver = pardiso
      fc1: FullyCoupled